// SBML level 3 version 2
// Created with https://github.com/matthiaskoenig/sbmlutils.

model glimepiride_intestine(PODOSE_gli, Ka_dis_gli, Mr_gli, Vext, Vlumen, Vfeces, Vstomach, gli_lumen, gli_ext, m1_ext, m2_ext, m1_lumen, m2_lumen, m1_feces, m2_feces)
  // Model for glimepiride absorption in the small intestine
  // Model for glimepiride absorption
  // 100% fraction absorbed
  // reabsorption of glimepiride metabolites into the intestinal lumen (not biliary)
  // 40% of the dose as metabolites in feces
  // Terms of use
  // The content of this model has been carefully created in a manual research effort. This file has been created by Matthias König using sbmlutils. For questions contact koenigmx@hu-berlin.de. Copyright © 2025 Matthias König.
  // This work is licensed under a Creative Commons Attribution 4.0 International License.
  // Redistribution and use of any part of this model, with or without modification, are permitted provided that the following conditions are met:
  // Redistributions of this SBML file must retain the above copyright notice, this list of conditions and the following disclaimer.
  // Redistributions in a different form must reproduce the above copyright notice, this list of conditions and the following disclaimer in the documentation and/or other materials provided with the distribution.
  // This model is distributed in the hope that it will be useful, but WITHOUT ANY WARRANTY; without even the implied warranty of MERCHANTABILITY or FITNESS FOR A PARTICULAR PURPOSE.
  // model units - substance: mmole, time: min, volume: litre, area: m2, length: metre, extent: mmole

  // Compartments:
  compartment Vext = 1 litre; Vext is "plasma";  // SBO:0000290 ncit:C13356 BTO:0000131
  compartment Vlumen = 1 litre; Vlumen is "intestinal lumen (inner part of intestine)";  // SBO:0000290 FMA:14586 UBERON:0018543
  compartment Vfeces = 1 litre;  // SBO:0000290 FMA:64183 ncit:C13234 BTO:0000440
  compartment Vstomach = 1 litre;  // SBO:0000290 FMA:7148 ncit:C12391 UBERON:0000945

  // Species:
  substanceOnly species $gli_stomach in Vstomach = 0; gli_stomach is "glimepiride (stomach)";  // SBO:0000247 CHEBI:5383 ncit:C29073 snomed:386966003
  species gli_lumen in Vlumen = 0; gli_lumen is "glimepiride (intestinal lumen)";  // SBO:0000247 CHEBI:5383 ncit:C29073 snomed:386966003
  species gli_ext in Vext = 0; gli_ext is "glimepiride (plasma)";  // SBO:0000247 CHEBI:5383 ncit:C29073 snomed:386966003
  species m1_ext in Vext = 0; m1_ext is "M1 (plasma)";  // SBO:0000247 CHEBI:180533 pubchem.compound:130939 inchikey:YUNQMQLWOOVHKI-UHFFFAOYSA-N
  species m2_ext in Vext = 0; m2_ext is "M2 (plasma)";  // SBO:0000247 pubchem.compound:10075365 inchikey:MMZLACCSCMGVHL-UHFFFAOYSA-N
  species m1_lumen in Vlumen = 0; m1_lumen is "M1 (intestinal lumen)";  // SBO:0000247 CHEBI:180533 pubchem.compound:130939 inchikey:YUNQMQLWOOVHKI-UHFFFAOYSA-N
  species m2_lumen in Vlumen = 0; m2_lumen is "M2 (intestinal lumen)";  // SBO:0000247 pubchem.compound:10075365 inchikey:MMZLACCSCMGVHL-UHFFFAOYSA-N
  substanceOnly species m1_feces in Vfeces = 0; m1_feces is "M1 (feces)";  // SBO:0000247 CHEBI:180533 pubchem.compound:130939 inchikey:YUNQMQLWOOVHKI-UHFFFAOYSA-N
  substanceOnly species m2_feces in Vfeces = 0; m2_feces is "M2 (feces)";  // SBO:0000247 pubchem.compound:10075365 inchikey:MMZLACCSCMGVHL-UHFFFAOYSA-N

  // Parameters:
  // GLIABS of dose is absorbed. (1-GLIABS) is excreted in feces. No parent drug found in feces.
  F_gli_abs = 1 dimensionless; F_gli_abs is "fraction absorbed glimepiride";  // SBO:0000002
  GLIABS_k = 0.01 per_min; GLIABS_k is "rate of glimepiride absorption";  // SBO:0000009
  // 1.0: normal absorption corresponding to tablet under fasting conditions; food decreases the absorption rate, i.e. < 1.0.
  f_absorption = 1 dimensionless; f_absorption is "scaling factor for absorption rate";  // SBO:0000009
  // Assumption: same rate for M1 and M2.
  MREABS_k = 0.05 per_min; MREABS_k is "rate constant for M1 and M2 reabsorption from plasma to intestine";  // SBO:0000009
  // Assumption: same rate for M1 and M2.
  MEXC_k = 0.1 per_min; MEXC_k is "rate feces excretion of M1 and M2";  // SBO:0000009
  PODOSE_gli = 0 mg; PODOSE_gli is "oral dose glimepiride [mg]";  // SBO:0000002
  Ka_dis_gli = 2 per_hr; Ka_dis_gli is "Ka_dis [1/hr] dissolution glimepiride";  // SBO:0000002
  Mr_gli = 490.616 g_per_mole; Mr_gli is "Molecular weight glimepiride [g/mole]";  // SBO:0000647
  absorption has mmole_per_min; absorption is "absorption glimepiride";
  mtot_feces has mmole; mtot_feces is "total fecal metabolites (M1 + M2)";

  // Assignment rules:
  absorption := f_absorption*GLIABS_k*Vlumen*gli_lumen;
  mtot_feces := m1_feces + m2_feces;

  // Rate rules:
  PODOSE_gli' = -dissolution_gli*Mr_gli;

  // Reactions:
  // Due to 100% absorption no process for excretion of gli in feces is added.
  GLIABS: gli_lumen => gli_ext; F_gli_abs*absorption; GLIABS is "absorption glimepiride";  // SBO:0000655
  M1REABS: m1_ext => m1_lumen; MREABS_k*m1_ext*Vlumen; M1REABS is "reabsorption M1 (lumen)";  // SBO:0000655
  M2REABS: m2_ext => m2_lumen; MREABS_k*m2_ext*Vlumen; M2REABS is "reabsorption M2 (lumen)";  // SBO:0000655
  // Assumption: same rate for M1 and M2.
  M1EXC: m1_lumen => m1_feces; MEXC_k*m1_lumen*Vlumen; M1EXC is "excretion M1 (feces)";  // SBO:0000655
  // Assumption: same rate for M1 and M2.
  M2EXC: m2_lumen => m2_feces; MEXC_k*m2_lumen*Vlumen; M2EXC is "excretion M2 (feces)";  // SBO:0000655
  // Swallowing, dissolution of tablet, and transport into intestine. Overall process describing the rates of this processes.
  dissolution_gli: $gli_stomach => gli_lumen; Ka_dis_gli/(60 min_per_hr)*PODOSE_gli/Mr_gli; dissolution_gli is "dissolution glimepiride";  // SBO:0000176

  // Unit definitions:
  unit g_per_mole = gram / mole; g_per_mole is "g/mole";
  unit l_per_min = litre / (60 second); l_per_min is "l/min";
  unit m2 = metre^2; m2 is "meter^2";
  unit mM = 1e-3 mole / litre; mM is "mmole/liter";
  unit mg = 1e-3 gram;
  unit mg_per_min = 1e-3 gram / (60 second); mg_per_min is "mg/min";
  unit mg_per_s_l = 1e-3 gram / (second * litre); mg_per_s_l is "mg/s/l";
  unit min = 60 second;
  unit min_per_hr = 60 second / (3600 second); min_per_hr is "min/hour";
  unit mmole = 1e-3 mole;
  unit mmole_per_min = 1e-3 mole / (60 second); mmole_per_min is "mmole/min";
  unit mmole_per_min_l = 1e-3 mole / (60 second * litre); mmole_per_min_l is "mmole/min/l";
  unit per_hr = 1 / (3600 second); per_hr is "1/hr";
  unit per_min = 1 / (60 second); per_min is "1/min";
  unit per_mmole = 1 / (1e-3 mole); per_mmole is "1/mmole";
end
